# Лабораторная работа №1 студента 4 группы, ПОИТ, Астапкиной Екатерины
# 2. Вычислить выражения, n - 2, х - 9
# а)
a := 4*sqrt(5 - 2*sqrt(6))/((nthroot(3, 4) + nthroot(2, 4))*(nthroot(2, 4) - nthroot(3, 4)))
a = -4
x := 9
n := 2
# б)
y := (sqrt(x^3 + n) + cos(|n*x - 1|))/nthroot(x^5 + 8*x + n, 4)
y = 1.71624
# в)
t := (sum(sin(i/n), i = 1 .. 10) + sum((i - n)/(i + n), i = 1 .. 5))/product((n + 3*i)/(n^2 + n*i - n), i = 1 .. 5)
t = 0.341422
# 3. Построить табллицу значений функции. Построить и отформатировать график функции.
# х [-2 2],  dx =0.2
x := -2, -1.8 .. 2
y(x) := (e^(2*x)*nthroot(1 - 4*x^2, 3))
x = [-2; -1.8; -1.6; -1.4; -1.2; -1; -0.8; -0.6; -0.4; -0.2; 0; 0.2; 0.4; 0.6; 0.8; 1; 1.2; 1.4; 1.6; 1.8; 2]
y(x) = [-0.0451702; -0.0624861; -0.0855359; -0.115432; -0.152603; -0.195187; -0.234155; -0.229085; 0.319643; 0.632473; 1; 1.40759; 1.5832; -2.52525; -5.74442; -10.6569; -18.5428; -31.216; -51.4793; -83.6958; -134.651]
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# 4. Выполнить действия с матрицами.
# Создать две матрицы А и В размером 3х3 и матрицу V размером 3х1 - вектор. Вычислить:
# С=АВ, d = |A| * |B|, g = V^T AV, S = BV, E = A^-1 C - B, q = maxA, p = minB
# maxA - максимальный элемент матрицы А
# minB  - минимальный элемент матрицы В
A := [5, 8, 7; 1, 2, 6; 7, 1, 3]
B := [3, 1, 2; 7, 8, 9; 4, 2, 6]
V := [5; 3; 9]
d := |A|*|B|
C := A*B
C = [99, 83, 124; 41, 29, 56; 40, 21, 41]
d = 10608
S := B*V
g := transpose(V)*A*V
g = 1340
S = [36; 140; 80]
E := A^-1*C - B
E = [
    -4.44089e-16, 0, -1.77636e-15;
    1.77636e-15, 3.55271e-15, 1.77636e-15;
    -1.33227e-15, -1.11022e-15, -8.88178e-16
]
q := max(A)
p := min(B)
q = 8
p = 1
# 5. Вычислить интеграл: при а= - п/2 , b = п/2
a := -π/2
b := π/2
integral((t + 1)*cos(n*t - 2)/sqrt(sin(t)^3 + 4), t = a .. b) = 0.648453
# 6. Построить и отформатировать график поверхности:
# х[-5 5], y[-5 5], n=50, dx = 0.2,  dy = 0.2
f(x, y) := sin(x)/x + sin(y)/y
x0 := -5
y0 := -5
dx := 0.2
dy := 0.2
n := 50
i := 0 .. n - 1
j := 0 .. n - 1
x[i] := x0 + i*dx
y[j] := y0 + j*dy
M[i, j] := f(x[i], y[j])
M[i, j] =  # no stored result
# [component: inputs M]
