# Задание № 1
# Решить уравнение 3x + cosx + 1 =0
x := -3, -2.9 .. 3
f(x) := 3*x + cos(x) + 1
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x := -1
root(f(x), x) = -0.607102  # Корень
# Решить уравнение (x + 2)sin(x + 2) - 1 = 0
x := -3, -2.9 .. 3
f(x) := (x + 2)*sin(x + 2) - 1
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x := -1
root(f(x), x) = -0.885843  # Первый корень
x := 1
root(f(x), x) = 0.772605  # Второй корень
# Задание № 2
х^4 + 6*х^3 + х^2 - 4*х - 60 = 0  # error: Эта переменная не определена.
V := [-60; -4; 1; 6; 1]  # Вектор коэффициентов
x := polyroots(V)  # Результат
x = [-6; -1 - 2i; -1 + 2i; 2]
# Задание № 3  Решить систему уравнений
# Функция Find
x1 := 1
x2 := 1
x3 := 1
x4 := 1
Given
x1 + 2*x2 + 3*x3 + 4*x4 == 22
2*x1 + 3*x2 + x3 + 2*x4 == 17
x1 + x2 + x3 - x4 == 8
x1 - 2*x3 - 3*x4 == -7
V := Find(x1, x2, x3, x4)
Результат
V = [4; 1; 4; 1]
# Матричный способ
# Матрица коэффициентов | Вектор правых частей
A := [1, 2, 3, 4; 2, 3, 1, 2; 1, 1, 1, -1; 1, 0, -2, -3]
B := [22; 17; 8; -7]
X := A^-1*B
Результат
X = [4; 1; 4; 1]
# Функция lsolve
A := [1, 2, 3, 4; 2, 3, 1, 2; 1, 1, 1, -1; 1, 0, -2, -3]
B := [22; 17; 8; -7]
lsolve(A, B) = [4; 1; 4; 1]
# Задание №4  Решить систему
# Функция Minerr
x := 0
y := 1
Given
sin(x + 0.5) - y == 1
cos(y - 2) + x == 0
V := Minerr(x, y) = [0.537853; -0.138685]
# Функция Given
x := 0
y := 1
Given
sin(x + 0.5) - y == 1
cos(y - 2) + x == 0
V := Find(x, y) = [0.537853; -0.138685]
