# Задание 1
limit((1 - z)*tan(π*z/2), z → 1) → 2/π
d/dx(e^(2*x)*nthroot(1 - 4*x^2, 3)) → 2*e^(2*x)*nthroot(1 - 4*x^2, 3) + 8*x*e^(2*x)*nthroot(1 - 4*x^2, 3)/(3*(4*x^2 - 1))
integral(x/(1 + x^2), x) → ln(x^2 + 1)/2
# Задание 2
3*x + cos(x) + 1
# -0.607101648103 | Решение
(x + 2)*sin(x + 2) - 1
# -3.11415714087 | Решение
x^4 + 6*x^3 + x^2 - 4*x - 60 == 0
[2; -6; -1 + 2i; -1 - 2i]
# Задание 3
x := -5, -4.9 .. 5
f1(x) := sqrt(x)
f2(x) := e^x
f3(x) := ln(x)
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# Задание 4
a := -1.17
j := 0.8, 0.82 .. 1
j = [0.8; 0.82; 0.84; 0.86; 0.88; 0.9; 0.92; 0.94; 0.96; 0.98; 1]
f(j) := if(j < 0.85, sqrt(|a + j|), ln(j))
f(j) = [0.608276; 0.591608; 0.574456; -0.150823; -0.127833; -0.105361; -0.0833816; -0.0618754; -0.040822; -0.0202027; 0]
