# Задание 1
x := 4
z := (x^2 + 2*x - 3 + (x + 1)*sqrt(x^2 - 9))/(x^2 - 2*x - 3 + (x - 1)*sqrt(x^2 - 9))
z = 2.64575
# Задание 2
b := 1.5
x := 0.1, 0.2 .. 1
x = [0.1; 0.2; 0.3; 0.4; 0.5; 0.6; 0.7; 0.8; 0.9; 1]
q(x) :=
    (b*x - ln(b*x)) if b*x < 1
    1 if b*x == 1
    (b*x + ln(b*x)) if b*x > 1
q(x) = [2.04712; 1.50397; 1.24851; 1.11083; 1.03768; 1.00536; 1.09879; 1.38232; 1.6501; 1.90547]
# Задание 3
a := -1.17
f(n) :=
    i ← 1
    for j ∈ 0.8, 0.82 .. n
        x[i] ←
            sqrt(|a + j|) if j < 0.85
            ln(j) if j ≥ 0.85
        i ← i + 1
    x
f(1) = [0; 0.608276; 0.591608; 0.574456; -0.150823; -0.127833; -0.105361; -0.0833816; -0.0618754; -0.040822; -0.0202027; 0]
